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# Робота студента групи 143-1 Скубача Віталія
n := 15
Δ := [1, n - 7, 1 - n, 0; -1, -2, 0, n; 0, 1, -2, 3; n - 10, n + 5, 4, 0] = [1, 8, -14, 0; -1, -2, 0, 15; 0, 1, -2, 3; 5, 20, 4, 0]
|Δ| = 18
det(Δ) = 18
Δ := -Δ[3, 0]*det([8, -14, 0; -2, 0, 15; 1, -2, 3]) + Δ[3, 1]*det([1, -14, 0; -1, 0, 15; 0, -2, 3]) - Δ[3, 2]*det([1, 8, 0; -1, -2, 15; 0, 1, 3]) = 18
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i1 := 1
j1 := 1
k1 := 1
l1 := 1
i2 := 2
j2 := 2
k2 := 2
l2 := 2
i3 := 3
j3 := 3
k3 := 3
l3 := 3
i4 := 4
l4 := 4
A := [
    3*i1^2 - 4*j1, 3*i1^2 - 4*j2, 3*i1^2 - 4*j3;
    3*i2^2 - 4*j1, 3*i2^2 - 4*j2, 3*i2^2 - 4*j3;
    3*i3^2 - 4*j1, 3*i3^2 - 4*j2, 3*i3^2 - 4*j3;
    3*i4^2 - 4*j1, 3*i4^2 - 4*j2, 3*i4^2 - 4*j3
] = [-1, -5, -9; 8, 4, 0; 23, 19, 15; 44, 40, 36]
B := [
    k1 + 5*l1 - 2, k1 + 5*l2 - 2, k1 + 5*l3 - 2, k1 + 5*l4 - 2;
    k2 + 5*l1 - 2, k2 + 5*l2 - 2, k2 + 5*l3 - 2, k2 + 5*l4 - 2;
    k3 + 5*l1 - 2, k3 + 5*l2 - 2, k3 + 5*l3 - 2, k3 + 5*l4 - 2
] = [4, 9, 14, 19; 5, 10, 15, 20; 6, 11, 16, 21]
α := -6
β := -5
# 1)
α*A + β*transpose(B) = [-14, 5, 24; -93, -74, -55; -208, -189, -170; -359, -340, -321]
transpose(B) = [4, 5, 6; 9, 10, 11; 14, 15, 16; 19, 20, 21]
# 2)
A*B = [-83, -158, -233, -308; 52, 112, 172, 232; 277, 562, 847, 1132; 592, 1192, 1792, 2392]
B*A = [1226, 1042, 858; 1300, 1100, 900; 1374, 1158, 942]
# 3)
C := [2, 0, n - 25; n + 1, 1, 2; 0, 1, 1] = [2, 0, -10; 16, 1, 2; 0, 1, 1]
C^-1 = [
    0.00617284, 0.0617284, -0.0617284;
    0.0987654, -0.0123457, 1.01235;
    -0.0987654, 0.0123457, -0.0123457
]
C*C^-1 = [1, 0, 0; 0, 1, 0; 0, 0, 1]
C^-1*C = [1, 0, 0; 0, 1, 0; 0, 0, 1]
# 4)
transpose(A*B) = [-83, 52, 277, 592; -158, 112, 562, 1192; -233, 172, 847, 1792; -308, 232, 1132, 2392]
transpose(B)*transpose(A) = [-83, 52, 277, 592; -158, 112, 562, 1192; -233, 172, 847, 1792; -308, 232, 1132, 2392]
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D := augment(transpose(B), A) = [4, 5, 6, -1, -5, -9; 9, 10, 11, 8, 4, 0; 14, 15, 16, 23, 19, 15; 19, 20, 21, 44, 40, 36]
i := 3
j := 5
cols(D) = 6
rows(D) = 4
rank(D) = 3
max(D) = 44
min(D) = -9
sum(sum(D[i, j], j = 1 .. 5), i = 1 .. 3) = 282
D[i, :] = [19, 20, 21, 44, 40, 36]
D[:, j] = [-9; 0; 15; 36]
D[i, j] = 36
