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A := [6, 3, 0; -4, 7, 1; 1, 1, -1]
B := [4, 1, -2; 3, 0, 5; -2, 2, 4]
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# a)
X1 := B*A^-1 = [0.22807, -0.210526, 1.78947; 1.38596, 0.105263, -4.89474; 0.596491, 0.526316, -3.47368]
X1*A = [4, 1, -2; 3, 0, 5; -2, 2, 4]
E := [1, 0, 0; 0, 1, 0; 0, 0, 1]
# b)
X2 := A^-1*E*B^-1 = [0.00758653, 0.0165955, -0.0301091; 0.029872, 0.00284495, 0.0376956; 0.11854, -0.115695, -0.032954]
A*X2*B = [1, 0, 0; 0, 1, 0; 0, 0, 1]
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A1 := [4, 1, 2, 2; 5, 3, 2, 2; 1, 2, 3, 2; 4, 2, 3, 1]
B1 := [3; 5; 3; 1]
C1 := augment(A1, B1) = [4, 1, 2, 2, 3; 5, 3, 2, 2, 5; 1, 2, 3, 2, 3; 4, 2, 3, 1, 1]
rank(A1) = 4
rank(C1) = 4
# Ранг основної матриці дорівнює рангу розширеної матриці, отже СЛАР сумісна;
# Ранг дорівнює кількості невідомих, отже система має єдиний розв'язок
A2 := [1, 3, 2, -1; 1, 2, 5, -1; 2, 5, 7, -2; 4, 11, 11, -4]
B2 := [-2; 3; 1; -3]
C2 := augment(A2, B2) = [1, 3, 2, -1, -2; 1, 2, 5, -1, 3; 2, 5, 7, -2, 1; 4, 11, 11, -4, -3]
rank(A2) = 2
rank(C2) = 2
# Ранг основної матриці дорівнює рангу розширеної матриці, отже СЛАР сумісна;
# Ранг матриці менший ніж кількість невідомих, отже система має безліч розв'язків
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A1 = [4, 1, 2, 2; 5, 3, 2, 2; 1, 2, 3, 2; 4, 2, 3, 1]
B1 = [3; 5; 3; 1]
# 1)Матричним:
X := A1^-1*B1 = [0; 1; -1; 2]
B1 := A1*X = [3; 5; 3; 1]
# 2)Крамера:
Δ := |A1| = -33
Δ1 := |augment(B1, A1[:, 1], A1[:, 2], A1[:, 3])| = -1.06581e-14
x1 := Δ1/Δ = 3.22974e-16
Δ2 := |augment(A1[:, 0], B1, A1[:, 2], A1[:, 3])| = -33
x2 := Δ2/Δ = 1
Δ3 := |augment(A1[:, 0], A1[:, 1], B1, A1[:, 3])| = 33
x3 := Δ3/Δ = -1
Δ4 := |augment(A1[:, 0], A1[:, 1], A1[:, 2], B1)| = -66
x4 := Δ4/Δ = 2
X3 := [x1; x2; x3; x4] = [0; 1; -1; 2]
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N := 15
K := [50, 10, 30; 35, 25, 20; 40, 20, 30]
L := [176 + N; 168 + 2*N; 184 + N] = [191; 198; 199]
X5 := K^-1*L = [2.8; 3.6; 0.5]
# Перевірка:
K*X5 = [191; 198; 199]
