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# Л.Р.№3 Студента 143-1 групи
# Скубача Віталія Олексійовича
# Варіант 15
k := 15
A := [k; k; 2 - 2*k] = [15; 15; -28]
# 1.
B := [2*k; k; -2*k] = [30; 15; -30]
C := [0; 5 + k; -2*k] = [0; 20; -30]
D := [k; 0; -3*k] = [15; 0; -45]
# -координати:
AB := B - A = [15; 0; -2]
AC := C - A = [-15; 5; -2]
AD := D - A = [0; -15; -17]
# -довжина векторів:
|AB| = 15.1327
|AC| = 15.9374
|AD| = 22.6716
# -косинус та синус кута між векторами:
cosφ := AB*AD/(|AB|*|AD|) = 0.0991014
sinφ := AB×AD/(|AB|*|AD|) = [-0.0874424; 0.74326; -0.655818]
# -скалярний добуток:
AB*AD = 34
|AB|*|AD|*cosφ = 34
# -векторний добуток:
AB×AD = [-30; 255; -225]
|AB|*|AD|*sinφ = [-30; 255; -225]
# -мішаний добуток векторів:
K := augment(AB, AC, AD) = [15, -15, 0; 0, 5, -15; -2, -2, -17]
transpose(K) = [15, 0, -2; -15, 5, -2; 0, -15, -17]
det(transpose(K)) = -2175
# мішаний добуток не дорівнює нулю, отже вектори AB,AC,AD - не компланарні;
# мішаний добуток < 0, отже вектори утворюють ліву трійку.
(AB×AC)*AD = -2175
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m := [0; -1; 3*k] = [0; -1; 45]
n := [4; 2*k; -3] = [4; 30; -3]
a := 3*m - 4*n = [-16; -123; 147]
b := m + 2*n = [8; 59; 39]
# відповідні координати колінеарних векторів є пропорційними, що в моєму випадку не справджується, отже вектори a,b не є колінеарними
a[0]/b[0] = -2
a[1]/b[1] = -2.08475
a[2]/b[2] = 3.76923
a*b = -1652  # скалярний добуток не дорівнює нулю, отже вектори не є перпендикулярними
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AB = [15; 0; -2]
AC = [-15; 5; -2]
AB×AC = [10; 60; 75]
S(паралелограма) := |AB×AC| = 96.566
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AB = [15; 0; -2]
AC = [-15; 5; -2]
AD = [0; -15; -17]
(AB×AC)*AD = -2175
V := 1/6*|(AB×AC)*AD| = 362.5
S := 1/2*|(AB×AC)| = 48.283
h := V/S = 7.50782
V := S*h = 362.5  # -перевірка
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p := [2; 1; 3]
q := [1; 7; -1]
r := [0; 5; -2]
x := [1; 3; 0]
(p×q)*r = -1  # задані вектори не компланарні, отже утворюють базис
l := augment(p, q, r)^-1*x = [3; -5; 7]
x1 := l[0] = 3
x2 := l[1] = -5
x3 := l[2] = 7
x := x1*p + x2*q + x3*r = [1; 3; 0]  # -перевірка
