# Лабораторна робота №5
# Тема: Початки математичного аналізу в MathCad: задачі на знаходження
# границь та першої похідної функції однієї змінної.
#
# Робота студента групи 143А(1) Скубача Віталія
# Варіант 15
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# 1. Знайти границі функцій:
# а)
limit((2*x^2 - 9*x + 4)/(sqrt(5 - x) - sqrt(x - 3)), x → 4) → -7
# б)
limit(((x + 2)/(x + 1))^(1 + 2*x), x → ∞) → e^2
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# 2. Дослідити на неперервність функцію та зобразити її графік:
f(x) :=
    if x < 0
        x - 3
    if 0 ≤ x ≤ 4
        x + 1
    if x > 4
        3 + x
f1(x) := x - 3
f2(x) := x + 1
f3(x) := 3 + x
# [plot: f(x) vs x]
limit(x, x → 4) + 1 → 5
limit(x, x → 0) + 1 → 1
limit(x, x → 4-) + 1 → 5
limit(x, x → 0-) - 3 → -3
limit(x, x → 4+) + 3 → 7
limit(x, x → 0+) + 1 → 1
# x1=4 - точка розриву першого роду (стрибок);
# величина стрибка 2
# x2=0 - точка розриву першого роду (стрибок);
# величина стрибка 4
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# 3. Скласти рівняння дотичної та нормалі до графіка функції y = f (x) у точці з
# абсцисою x0. Зобразити в одній системі координат графік функції, дотичної та
# нормалі, позначити точку дотику. Налаштувати відображення графіка: осі по
# центру, усі графіки відображаються суцільними (не пунктирними) лініями товщини 2.
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y(x) := (3*x - 2*x^3)/3
x0 := 1
y0 := y(x0) → 1/3
y'(x) → -(2*x^2) + 1
x := -3, -2.9 .. 3
y1(x) := y'(x0)*(x - x0) + y0 → (-(3*x) + 4)/3  # - рівняння дотичної (синій)
y2(x) := -1/y'(x0)*(x - x0) + y0 → (3*x - 2)/3  # - рівняння нормалі (зелений)
# [plot: y(x), y1(x), y2(x) vs x]
clear(x, y, y1)
# 4. Задано параметричну функцію. Зобразити її графік в системі координат хОу та знайти похідну y(x).
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x(t) := t + t^2
y(t) := 2*t^3 + t^2
d/dt(y(t)) → 6*t^2 + 2*t
d/dt(x(t)) → 2*t + 1
t := -2, -1.9 .. 2
y1(t) := d/dt(y(t))/d/dt(x(t)) → (6*t^2 + 2*t)/(2*t + 1) → (6*t^2 + 2*t)/(2*t + 1)
# [plot: y(t), y1(t) vs x(t), t]
