# Лабораторна робота №1.
# Робота студента групи 143А(1) Скубача Віталія.
# Тема: Комплексні числа, дії над ними та їх зображення на комплексній площині.
# ВАРІАНТ 12.
# 1. Дано комплексні числа z1, z2 та натуральне число m. Зобразити ці числа у вигляді векторів на комплексній площині (0,3 бала).
# Знайти:
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# Дано:
z1 := 3 + 2i
z2 := 3 - 2i
m := 24
X1 := [0; Re(z1)] = [0; 3]
# а)
z1 - z2 = 4i
z2 - z1 = -4i
Y1 := [0; Im(z1)] = [0; 2]
# б)
z1 + z2 = 6
X2 := [0; Re(z2)] = [0; 3]
# в)
conj(z1)*z2 = 5 - 12i
z1*conj(z2) = 5 + 12i
Y2 := [0; Im(z2)] = [0; -2]
# г)
z1/z2 = 0.384615 + 0.923077i
z2/z1 = 0.384615 - 0.923077i
# ґ)
z1^m = 584824319281 + 23290743888720i
z2^m = 584824319281 - 23290743888720i
# д)
z2 = 3 - 2i
mz2 := |z2| → sqrt(13)
az2 := arg(z2) → -atan(2/3)
# тригонометрична:
trz2 := mz2*(cos(az2) + 1i*sin(az2))
trz2 explicit, ALL → sqrt(13)*(cos(-atan(2/3)) + 1i*sin(-atan(2/3))) = 3 - 2i
# показникова:
pz2 := mz2*exp(1i*az2)
# [plot: Y1, Y2 vs X1, X2]
pz2 explicit, ALL → sqrt(13)*exp(1i*(-atan(2/3))) = 3 - 2i
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z := sqrt(3) - 1i
n := 3
k := 0 .. n - 1 = [0; 1; 2]
nthroot(|z|, n) → 2^(1/3) = 1.25992
ω_k := nthroot(|z|, n)*(cos((arg(z) + 2*π*k)/n) + 1i*sin((arg(z) + 2*π*k)/n))
ω_k = [1.24078 - 0.218783i; -0.430918 + 1.18394i; -0.809862 - 0.965156i]
# або
ω_k → [
    2^(1/3)*(-(1i*sin(π/18)) + cos(π/18));
    2^(1/3)*(1i*sin(7*π/18) - cos(7*π/18));
    2^(1/3)*(-(1i*sin(5*π/18)) - cos(5*π/18))
]
ω_0 := 2^(1/3)*(-(1i*sin(π/18)) + cos(π/18))
ω_1 := 2^(1/3)*(1i*sin(7*π/18) - cos(7*π/18))
x := Re(ω_0)
R := nthroot(|z|, n)
ω_2 := 2^(1/3)*(-(1i*sin(5*π/18)) - cos(5*π/18))
y := Im(ω_0)
# [plot: R*cos(t), Im(ω_0), Im(ω_1), Im(ω_2) vs R*sin(t), Re(ω_0), Re(ω_1), Re(ω_2)]
t := 0, 0.01 .. 2*π
clear(z)
# 3. Знайти усі корені рівнянь, використовуючи 2 різні MathCad-функції
# (solve та polyroots) (0,3 бала).
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# Solve:
3*z^2 - 2*z + 6 == 0 solve, z → [(sqrt(17)*1i + 1)/3; (-(sqrt(17)*1i) + 1)/3]
z^2 + (2 + 3i)*z - (4 + 3i) == 0 solve, z → [(sqrt(11 + 24i) - (2 + 3i))/2; (-sqrt(11 + 24i) - (2 + 3i))/2]
# Polyroots:
v1 := [6; -2; 3]
polyroots(v1) = [0.333333 - 1.37437i; 0.333333 + 1.37437i]
v2 := [4 + 3i; 2 + 3i; 1]
polyroots(v2) = [-1 - 3.79129i; -1 + 0.791288i]
