# Робота студента групи 143-1 Скубача Віталія
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ORIGIN := 1
A*x + B*y + C == 0  # - Загальне рівняння прямої
-3*x + 4*y == 0
# - рівняння прямої p
A := -3
B := 4
n := [A; B] = [-3; 4]
M0 := [5; -2]
x0 := M0[1, 1] = 5
y0 := M0[2, 1] = -2
# 1)
A*(x - x0) + B*(y - y0) == 0 → 4*y + (23 - 3*x) == 0
# або
-3*x0 + 4*y0 + C == 0 solve, C → 23
-3*x + 4*y + 23 == 0  # - Загальне рівняння прямої p1, що проходить через точку M0 паралельно до прямої p.
# 2)
k1 := -A/B → 3/4
k1*k2 == -1 solve, k2 → -4/3
k2 := -4/3  # - за умовою перпендикулярності прямих з кутовими коефіцієнтами
-y0 + k2*x0 + b2 solve, b2 → 14/3
b2 := 14/3
y2(x) := k2*x + b2 → -4*x/3 + 14/3  # - шукане рівняння прямої p2
clear(y2)
# 3)
y(x) := 3*x/4
y2(x) := -4*x/3 + 14/3
P1 := y(x) == y2(x) solve, x → 56/25
P2 := y(P1) → 42/25
P := [P1; P2] = [2.24; 1.68]  # - точка перетину прямих p і p2
# 4)
d(M0, p) := |A*x0 + B*y0|/sqrt(A^2 + B^2) = 4.6
clear(y, y1, y2)
y(x) := 3*x/4  # - рівняння прямої p
y1(x) := (3*x - 23)/4  # - рівняння прямої p1, що проходить через точку M0 паралельно до прямої p.
y2(x) := k2*x + b2 → -4*x/3 + 14/3  # - шукане рівняння прямої p2
# [plot: y(x), M0[2], y1(x), y2(x), P[2] vs x, M0[1], P[1]]
clear(x0, y0, A, B, N, S, P)
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P(x, y, z) := 2*x^2 + 6*y^2 + 4*z^2 - 12 == 0 solve, z → [sqrt(-(24*y^2) + (48 - 8*x^2))/4; -sqrt(-(24*y^2) + (48 - 8*x^2))/4]
z1(x, y) := sqrt(-(24*y^2) + (48 - 8*x^2))/4
z2(x, y) := -sqrt(-(24*y^2) + (48 - 8*x^2))/4
clear(z1, z2)
z1(x, y) :=
    if -(24*y^2) + (48 - 8*x^2) ≥ 0
        sqrt(-(24*y^2) + (48 - 8*x^2))/4
    else
        0
z2(x, y) :=
    if -(24*y^2) + (48 - 8*x^2) ≥ 0
        -sqrt(-(24*y^2) + (48 - 8*x^2))/4
    else
        0
# [3D plot: z1, z2]
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clear(z1, z2)
2*x^2 + 6*y^2 + 4*z^2 - 12 == 0
x^2/6 + y^2/2 + z^2/3 == 1
a == sqrt(6)
b == sqrt(2)
c == sqrt(3)
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x0 := 10
y0 := 9
z0 := 6
Q := [x0; y0; z0] = [10; 9; 6]
R := [2; 8; 2]
S := [9; 8; 9]
T := [7; 10; 3]
# 1) Загальне рівняння площини RST:
A := -14
F(x, y, z) := det([
    x - R[1], y - R[2], z - R[3];
    S[1] - R[1], S[2] - R[2], S[3] - R[3];
    T[1] - R[1], T[2] - R[2], T[3] - R[3]
]) → 14*z + (28*y - (14*x + 224))
B := 28
C := 14
D := -224
N := [A; B; C] = [-14; 28; 14]
z1(x, y) := F(x, y, z) == 0 solve, z → -(2*y) + x + 16  # - виражаємо z(x,y)
# 2)  Відстань від точки Q до площини RST:
d1 := |A*x0 + B*y0 + C*z0 + D|/sqrt(A^2 + B^2 + C^2) = 0.816497
# 3) Рівняння площини π ,яка проходить через точку Q, паралельно до площини RST:
-14*x + 28*y + 14*z + D2 == 0  # -загальне рівняння площини π, паралельної до площини RST
D2 := -14*x0 + 28*y0 + 14*z0 + D2 == 0 solve, D2 → -196  # - загальне рівняння площини π
π(x, y, z) := -14*x + 28*y + 14*z + D2 == 0 → 14*z + (28*y - (14*x + 196)) == 0
clear(S)
z2(x, y) := π(x, y, z) == 0 solve, z → -(2*y) + x + 14  # - виражаємо z(x,y)
# 4) Рівняння прямої p3, яка проходить через точку Q, перпендикулярно до площини RST:
clear(x, y, z, P)
Q = [10; 9; 6]
N = [-14; 28; 14]  # --->
m := -14
n := 28
p := 14
S := [m; n; p] = [-14; 28; 14]
(x - x0)/m == (y - y0)/n == (z - z0)/p → (-x + 10)/14 == (y - 9)/28 and (y - 9)/28 == (z - 6)/14  # -канонічне рівняння прямої p3
x(t) := (-x + 10)/14 == t solve, x → -(14*t) + 10
y(t) := (function - 9)/28 == t solve, function → 28*t + 9
z(t) := (z - 6)/14 == t solve, z → 14*t + 6
P(t) := [x(t); y(t); z(t)] → [-(14*t) + 10; 28*t + 9; 14*t + 6]
# [3D plot: z1, z2, P]
# [3D plot: z1, z2]
# z1 - площина RST
# z2 - площина π
# P - пряма p
