# Лабораторна робота №6
#
# Тема: Початки математичного аналізу в MathCad: застосування
# диференціального числення функції однієї змінної.
#
# Робота студента групи 143А(1) Скубача Віталія
# Варіант 15
# Завдання 1. Провести повне дослідження функції та побудувати графік:
y(x) := 5*x/(4 - x^2)
# 1.1. Дослідження без застосування похідної:
# 1)
4 - x^2 == 0 solve, x → [2; -2]  # (-∞; - 2)∪(-2*;2)*∪(2*; + ∞) - область визначення функції
# 2)
y(-x) → 5*x/(x^2 - 4)
-y(x) → 5*x/(x^2 - 4)  # y(-x) = -y(x), отже функція не парна
# 3) функція не періодична, оскільки вона не задовольняє умову рівності для всіх x із фіксованим T.
# 4) Точки перетину графіка функції з координатними осями:
y(0) = 0  # - точка перетину з віссю Oy: (0;0).
y(x) == 0 → -(5*x)/(x^2 - 4) == 0 solve, x → 0  # - точка перетину з віссю Ox: (0;0).
# 5) Дослідити функцію на неперервність:
# x2 = -2 - точка розриву другого роду. | x1 = 2 - точка розриву другого роду.
limit(y(x), x → -2-) → ∞
limit(y(x), x → 2-) → ∞
limit(y(x), x → -2+) → -∞
limit(y(x), x → 2+) → -∞
# 6) Знайти асимптоти:
# - вертикальні x=a, якщо limit(f(x), x → a)не існує або limit(f(x), x → a)= ∞;
limit(y(x), x → -2) → undefined
limit(y(x), x → 2) → undefined
# Прямі x=-1 та x=1 є вертикальними асимптотами графіка даної функції
# – похилі асимптоти y=kx + b, де k=limit(f(x)/x, x → ∞) або limit(f(x)/x, x → -∞), b= limit(f(x) - kx, x → ∞) або limit(f(x) - kx, x → -∞). (якщо хоча б одна з границь не існує або дорівнює безмежності, то крива похилої асимптоти не має).
#
# Отже похилих асимптот немає.
# - горизонтальні асимптоти y=b, b = limit(f(x)/x, x → ∞) або limit(f(x)/x, x → -∞)
limit(y(x)/x, x → ∞) → 0
limit(y(x)/x, x → -∞) → 0
# y=0 - горизонтальна асимптота функції y(x)
# 1.2. Дослідження з першою похідною:
# 1) Знайти проміжки монотонності та точки екстремуму.
y1(x) := d/dx(y(x)) → (5*x^2 + 20)/(x^4 - 8*x^2 + 16)
5*x^2 + 20 == 0 solve, x → [2i; -2i]
(x^4 - 8*x^2 + 16) == 0 solve, x → [2; 2; -2; -2] = [2; 2; -2; -2]
y1(x) > 0 solve, x → x < -2 or -2 < x < 2 or x > 2  # - проміжки зростання функції (вся область визначення) - (−∞,−2)∪(−2,2)∪(2,∞).
y1(x) < 0 solve, x →  # error: No solution was found.  # - проміжки спадання ф-ції (не спадає)
# Точок екстремуму немає, оскільки функція є строго зростаючою на всіх проміжках своєї області визначення.
# 1.3. Дослідження з другою похідною:
# 1) Знайти інтервали опуклості (вгнутості) функції та точки перегину.
y2(x) := y1'(x) → (-(10*x^3) - 120*x)/(x^6 - 12*x^4 + 48*x^2 - 64)
y2(x) == 0 solve → [0; 2*sqrt(3)*1i; -(2*sqrt(3)*1i)]  # 0 - точка перегину
# підозрілими на перегин є точки x=-2, x=2, але функція у цих точках не визначена, отже перегину в них бути не може.
x^6 - 12*x^4 + 48*x^2 - 64 == 0 solve, x → [2; 2; 2; -2; -2; -2]
y2(x) > 0 solve, x → x < -2 or 0 < x < 2  # - проміжки опуклості (−∞,−2)∪(0,2).
y2(x) < 0 solve, x → -2 < x < 0 or x > 2  # - проміжки вгнутості (−2,0)∪(2,∞).
x := -5, -4.9 .. 5
# [plot: y(x) vs x]
# Графік функції
y(x) := 5*x/(4 - x^2)
# Завдання 2. Знайти наближене значення:
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x0 := 0.5
Δx := -0.01
f(x) := asin(x)
f1(x) := d/dx(f(x)) → (-x^2 + 1)^(-1/2)
v := f1(x0)*Δx + f(x0) → 0.512051770215  # - наближене значення за формулою малих приростів
asin(x0) → 0.523598775598  # - наближене значення за вбудованим алгоритмом mathcad
