# Лабораторна робота №2
# Робота студента групи 143А(1) Скубача Віталія.
# Тема:Первісна. Невизначений інтеграл.
# Варіант 12.
# Завдання №1. Для заданої функції знайти первісну, графік якої проходить через точку A(x0;y0) . Зобразити графік даної первісної, позначити на графіку точку A(x0;y0).
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f(x) := (6*x - 7)/(3*x + 1)
x0 := 1/3
y0 := 2/3
F(x) := integral(f(x), x) → -(3*ln(3*x + 1)) + 2*x
C := F(x0) + C == y0 solve, C → ln(8)
y(x) := F(x) + C → -(3*ln(3*x + 1)) + ln(8) + 2*x
# [plot: y(x), y0 vs x, x0]
clear(f, F)
# Завдання №2.  Знайти невизначений інтеграл та перевірити отриманий результат диференціюванням.
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f(x) := cos(x)/sin(x)^4
F(x) := integral(f(x), x) → -1/(3*sin(x)^3)
# Перевірка:
d/dx(F(x)) → cos(x)/sin(x)^4
clear(f, F)
# Завдання №3. Обчислити невизначений інтеграл:
# а) розкладаючи підінтегральну функцію у суму простих дробів;
# б) безпосереднім використанням оператора невизначеного інтеграла;
# виконати перевірку.
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f(x) := (1 - 3*x)/(x^3 + 2*x^2 + x)
# а)
f(x) parfrac → 1/x - (x + 5)/(x^2 + 2*x + 1)
F(x) := integral(1/x - (x + 5)/(x^2 + 2*x + 1), x) → -ln(x + 1) + ln(x) + 4/(x + 1)
# Перевірка:
d/dx(F(x)) → (-(3*x) + 1)/(x^3 + 2*x^2 + x)
clear(F)
# б)
F(x) := integral(f(x), x) → -ln(x + 1) + ln(x) + 4/(x + 1)
# Перевірка:
d/dx(F(x)) → (-(3*x) + 1)/(x^3 + 2*x^2 + x)
