# Лабораторна робота №3
# Тема: Визначений інтеграл та його застосування. Невласні інтеграли.
# Робота студента групи 143-1 Скубача Віталія
# Варіант 12
# 1. Обчислити площу фігури, обмеженої заданими лініями. Зобразити область (фігуру) в системі координат. (0,8 бала)
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x := 0, 1 .. 1
f1(x) := x^3
f2(x) := 1
f1(x) == f2(x) → [0; 1]  # - абсциси точок перетину
clear(x)
# Штриховка:
a := 0
b := 1
d := 200
xx := 0, 0.1 .. 2
Δ := (b - a)/d
[x; y] :=
    for i ∈ 0, 2 .. d
        x[i] ← a + Δ*i
        x[i + 1] ← x[i] + Δ
        y[i] ← f1(x[i])
        y[i + 1] ← f2(x[i + 1])
    [x; y]
# [plot: y, f1(xx), f2(xx) vs x, xx]
S := integral(f2(x) - f1(x), x = a .. b) = 0.75  # кв. од.
# 2. Обчислити довжину дуги кривої, заданої в полярних координатах.
# Зобразити дану дугу у полярній системі координат. (0,4 бала)
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α := π/6
β := 7*π/6
n := 100
φ := π/6, π/5 .. 2*π
φ1 := α, α + π/n .. β
r(φ) := 5*cos(φ)^2
dovzh := integral(sqrt(r(φ)^2 + (d/dφ(r(φ)))^2), φ = α .. β) = 13.8017  # ум.од.
# [polar plot: φ1, r(φ1)]
# 3. Дослідити на збіжність невласні інтеграли(0,8 бала):
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# Безпосереднє обчислення:
I1 := integral(1/(x*ln(x)^5), x = e .. ∞) → 1/4  # інтеграл збіжний
I2 := integral(2*x/sqrt(1 - x^4), x = 0 .. 1) → π/2  # інтеграл збіжний
clear(I1, I2)
# За означенням:
I1(ε) := limit(integral(1/(x*ln(x)^5), x = e .. b), b → ∞) → 1/4  # інтеграл збіжний
I2(ε) := integral(2*x/sqrt(1 - x^4), x = 0 .. 1 - ε)
I := limit(I2(ε), ε → 0)  # error: Encountered a floating point error. This usually means that a value larger than 10^308 was encountered, or a function was evaluated at a point where the function is not defined.
